OpenVSP model (file version 5), 11 components.
Geometry view with OpenVSP parameter names; values to 6 digits, angles in degrees, lengths in the model's unit.
Overall bounding box: X_Min=-19.7 X_Len=38.7051 Y_Min=-25.398 Y_Len=50.796 Z_Min=-4.36786 Z_Len=10.0924

Fuselage "Fuselage"
  location (X Y Z) -17.8804 0 0.76087, rotation 0 6.5 0
  bounding box size 35.9751 5.25838 7.35068
  mass: Density=0 Shell_Flag=1 Mass_Area=2 Mass_Prior=0
  Design: Length=36
  cross sections:
    n   XLocPercent  YLocPercent  YRotate  ZLocPercent  shape
    0   0            0            0        0            point
    1   0.005        0            0        0            circle Circle_Diameter=1.84181
    2   0.022973     0            0        0            circle Circle_Diameter=2
    3   0.198499     0            0        -0.003       ellipse Ellipse_Height=4.1 Ellipse_Width=4.1574
    4   0.256581     0            0        -0.003       ellipse Ellipse_Height=4.42054 Ellipse_Width=4.83873
    5   0.283778     0            0        0.01         ellipse Ellipse_Height=5.3 Ellipse_Width=5
    6   0.321865     0            0        0.015        ellipse Ellipse_Height=5.65379 Ellipse_Width=5.02639
    7   0.381243     0            0        0.014        ellipse Ellipse_Height=5.75 Ellipse_Width=5.25838
    8   0.569564     0            2        0.002        ellipse Ellipse_Height=5.25 Ellipse_Width=5.25838
    9   0.727413     0            2        0.002        ellipse Ellipse_Height=3.9 Ellipse_Width=3.6
    10  0.99         0            0        0            ellipse Ellipse_Height=1.8 Ellipse_Width=1.41677
    11  1            0            0        0            point

Wing "Hstab"
  location (X Y Z) 14.8826 0 -1.9, rotation 0 10 0
  symmetric about XZ
  bounding box size 4.12351 16.8 0.846234
  mass: Density=0 Shell_Flag=1 Mass_Area=1 Mass_Prior=0
  totals: TotalSpan=16.8 TotalProjectedSpan=16.8 TotalChord=4.17701 TotalArea=70.1737 TotalAR=4.02202
  root: chord 4.18605, twist 0, NACA 4-series Camber=0 CamberLoc=0.2 ThickChord=0.119291
  sections:
    n  Span  Root_Chord  Tip_Chord  Area     Sweep  Sweep_Location  Dihedral  Twist  Twist_Location  tip airfoil
    1  8.4   4.18605     4.16797    35.0869  0      0               0         0      0.25            NACA 4-series Camber=0 CamberLoc=0.2 ThickChord=0.1
  SS_Control "Elevator": UStart=0.3333 UEnd=0.6666 Length_C_Start=0.454545 Length_C_End=0.454545 Length_Start=1.90275 Length_End=1.89453 LE_Flag=0 Surf_Type=2

Fuselage "Spinner"
  location (X Y Z) -19.7 0 0.98, rotation 0 6.5 0
  bounding box size 2.11412 1.76733 1.82267
  mass: Density=0 Shell_Flag=1 Mass_Area=0 Mass_Prior=0
  Design: Length=1.75
  cross sections:
    n  XLocPercent  YLocPercent  ZLocPercent  shape
    0  0            0            0            point
    1  0.99         0            0            circle Circle_Diameter=1.76733
    2  1            0            0            point

Propeller "Propeller"
  location (X Y Z) -18.5268 0 0.85, rotation 0 6.5 0
  bounding box size 0.925487 6.55037 7.48186
  mass: Density=0 Shell_Flag=1 Mass_Area=0 Mass_Prior=0
  Design: Diameter=8.41667 NumBlade=3 Beta34=20 UseBeta34Flag=1 Feather=0 Rotate=0 Precone=0 ReverseFlag=0 FoldAngle=0 PropMode=0 AF=117.684 CLi=0.538798 Chord=0.142921 Solidity=0.136479 ConstructXoC=0.5 FeatherAxisXoC=0.5 FeatherOffsetXoC=0
  cross sections:
    n  RadiusFrac  shape
    0  0.2         ellipse Ellipse_Height=0.168333 Ellipse_Width=0.336667
    1  0.4         NACA 16-series Chord=0.599282 IdealCl=0.7 ThickChord=0.144074
    2  1           NACA 16-series Chord=0.450058 IdealCl=0.2 ThickChord=0.03
  Chord along r/R (cubic Bezier): 0.2: 0.08, 0.334441: 0.15, 0.468883: 0.152778, 0.603324: 0.152778, 0.719114: 0.152778, 0.834903: 0.152778, 0.950693: 0.152778, 0.967128: 0.152778, 0.983564: 0.176944, 1: 0.106944
  Twist along r/R (PCHIP): 0.2: 46.75, 0.75: 20, 1: 13
  Thick along r/R (cubic Bezier): 0.2: 0.5, 0.233333: 0.3, 0.266667: 0.225, 0.3: 0.2, 0.4: 0.125, 0.5: 0.115, 0.6: 0.1, 0.733333: 0.075, 0.866667: 0.055, 1: 0.03
  CLI along r/R (cubic Bezier): 0.2: 0, 0.266667: 0.7, 0.333333: 0.7, 0.4: 0.7, 0.466667: 0.7, 0.533333: 0.7, 0.6: 0.7, 0.733333: 0.7, 0.866667: 0.7, 1: 0.2

Wing "Wing"
  location (X Y Z) -6.40816 0 2.17391, rotation 0 8.5 0
  symmetric about XZ
  bounding box size 6.16672 50.796 1.8041
  mass: Density=0 Shell_Flag=1 Mass_Area=2 Mass_Prior=0
  totals: TotalSpan=49.88 TotalProjectedSpan=49.88 TotalChord=6.21492 TotalArea=310 TotalAR=8.02585
  root: chord 6.21492, twist 2, NACA 5-digit CamberLoc=0.227435 IdealCl=0.832765 ThickChord=0.140909
  sections:
    n  Span   Root_Chord  Tip_Chord  Area  Sweep  Sweep_Location  Dihedral  Twist  Twist_Location  tip airfoil
    1  24.94  6.21492     6.21492    155   0      0               0         0      0.25            NACA 5-digit CamberLoc=0.224538 IdealCl=0.866894 ThickChord=0.140411
  SS_Control "Flaps": UStart=0.368182 UEnd=0.5175 Length_C_Start=0.25 Length_C_End=0.25 Length_Start=1.5537 Length_End=1.5535 LE_Flag=0 Surf_Type=2
  SS_Control "Ailerons": UStart=0.5175 UEnd=0.6666 Length_C_Start=0.25 Length_C_End=0.25 Length_Start=1.5535 Length_End=1.55373 LE_Flag=0 Surf_Type=2

Wing "Vstab"
  location (X Y Z) 17.25 0 -2, rotation -90 0 -171.5
  bounding box size 5.05078 0.504228 7.72457
  mass: Density=0 Shell_Flag=1 Mass_Area=1 Mass_Prior=0
  totals: TotalSpan=7.15831 TotalProjectedSpan=7.15831 TotalChord=4.2 TotalArea=30.0649 TotalAR=1.70436
  root: chord 4.2, twist 0, NACA 4-series Camber=0 CamberLoc=0.2 Invert=1 ThickChord=0.12
  sections:
    n  Span     Root_Chord  Tip_Chord  Area     Sweep    Sweep_Location  Dihedral  Twist  Twist_Location  tip airfoil
    1  7.15831  4.2         4.2        30.0649  1.30394  0               0         0      0.25            NACA 4-series Camber=0 CamberLoc=0.2 ThickChord=0.1
  SS_Control "Rudder": UStart=0.3333 UEnd=0.6666 Length_C_Start=0.456809 Length_C_End=0.456809 Length_Start=1.9186 Length_End=1.9186 LE_Flag=1 Surf_Type=2

Wing "Vtail"
  location (X Y Z) 13.3696 0 -1.52174, rotation -90 0 -167
  bounding box size 8.14267 0.802549 2.77589
  mass: Density=0 Shell_Flag=1 Mass_Area=1 Mass_Prior=0
  totals: TotalSpan=2.75648 TotalProjectedSpan=2.75648 TotalChord=4.06042 TotalArea=11.1924 TotalAR=0.678866
  root: chord 8.02083, twist 0, NACA 4-series Camber=0 CamberLoc=0.2 ThickChord=0.1
  sections:
    n  Span     Root_Chord  Tip_Chord  Area     Sweep    Sweep_Location  Dihedral  Twist  Twist_Location  tip airfoil
    1  2.75648  8.02083     0.1        11.1924  6.21868  0               0         0      0.25            as above

Blank "PropellerWeight"
  location (X Y Z) -18.5 0 0.825, rotation 0 0 0
  Mass: Point_Mass=135 Point_Mass_Flag=1

Blank "EngineWeight"
  location (X Y Z) -13 0 0.3, rotation 0 0 0
  Mass: Point_Mass=289 Point_Mass_Flag=1

Wing "RightHstabVstab"
  location (X Y Z) 14.4 7.94595 -1.8, rotation 0 10 0
  bounding box size 3.26695 0.2 1.7469
  totals: TotalSpan=0.2 TotalProjectedSpan=0.2 TotalChord=3.2 TotalArea=0.64 TotalAR=0.0625
  root: chord 3.2, twist 0, NACA 4-series Camber=0 CamberLoc=0.2 ThickChord=0.35
  sections:
    n  Span  Root_Chord  Tip_Chord  Area  Sweep  Sweep_Location  Dihedral  Twist  Twist_Location  tip airfoil
    1  0.2   3.2         3.2        0.64  0      0               0         0      0.25            as above

Wing "LeftHstabVstab"
  location (X Y Z) 14.4 -7.946 -1.8, rotation 0 10 0
  bounding box size 3.26695 0.2 1.7469
  totals: TotalSpan=0.2 TotalProjectedSpan=0.2 TotalChord=3.2 TotalArea=0.64 TotalAR=0.0625
  root: chord 3.2, twist 0, NACA 4-series Camber=0 CamberLoc=0.9 ThickChord=0.35
  sections:
    n  Span  Root_Chord  Tip_Chord  Area  Sweep  Sweep_Location  Dihedral  Twist  Twist_Location  tip airfoil
    1  0.2   3.2         3.2        0.64  0      0               0         0      0.25            NACA 4-series Camber=0 CamberLoc=0.2 ThickChord=0.35

VSPAERO settings: Sref=70.1737 bref=16.8 cref=4.17701 Xcg=-2.74395 Ycg=0 Zcg=0.549295 AlphaStart=0 AlphaEnd=30 AlphaNpts=1 BetaStart=0 BetaEnd=30 BetaNpts=1 MachStart=0.2 MachEnd=0 MachNpts=1 ReCref=1e+07 Vinf=236 Rho=0.002377
  control group "Flaps": DeflectionAngle=0
  control group "Ailerons": DeflectionAngle=20
  control group "Elevator": DeflectionAngle=0
  control group "Rudder": DeflectionAngle=20
