<?xml version="1.0"?>

<!--
	File:		 Pratt-Whitney-PT6A-20.xml
	Author:	 AeromatiC++ v 3.3.15

	See: http://wiki.flightgear.org/JSBSim_Engines#FGTurboprop

	Inputs:
		name:									 Pratt-Whitney-PT6A-20
		type:									 Turboprop Engine
		power:									550.0 hp
		inlet temperature:			1821.0 degrees C
		overall pressure ratio: 6.3:1

	Outputs:
		psfc:									 0.597 lbs/hr/hp
		engine weight:					298.3 lbs
		engine length:					4.6 ft
		engine diameter:				1.8 ft
-->

<turboprop_engine name="Pratt-Whitney-PT6A-20">
	<milthrust unit="LBS">1232</milthrust>
	<idlen1>50.6</idlen1>
	<idlen2>1113.6</idlen2>
	<maxn1>110</maxn1>
	<maxpower unit="HP">550</maxpower>
	<psfc unit="LBS/HR/HP">0.597</psfc>
	<n1idle_max_delay>1.5</n1idle_max_delay>
	<maxstartingtime>30</maxstartingtime>
	<startern1>20</startern1>
	<!--<ielumaxtorque unit="FT*LB">1386.5</ielumaxtorque>-->
	<itt_delay>3</itt_delay>
	<betarangeend>10</betarangeend>
	<reversemaxpower>500</reversemaxpower>

	<function name="EnginePowerVC">
		<table>
			<description> Engine power, function of airspeed and pressure </description>
			<independentVar lookup="row">atmosphere/P-psf</independentVar>
			<independentVar lookup="column">velocities/ve-kts</independentVar>
			<tableData>
						0	50		 100	150	200	250	300	350
			 503	 0.357	0.380	0.400	0.425	0.457	0.486	0.517	0.550
			 1048	 0.586	0.589	0.600	0.621	0.650	0.686	0.724	0.764
			 1328	 0.707	0.721	0.731	0.757	0.786	0.821	0.858	0.896
			 1496	 0.779	0.786	0.808	0.821	0.857	0.900	0.945	0.993
			 1684	 0.850	0.857	0.874	0.900	0.943	0.979	1.016	1.055
			 1896	 0.914	0.929	0.946	0.971	1		1.057	1.117	1.181
			 2135	 1		1.011	1.029	1.043	1.083	1.150	1.221	1.297
			 2213	 1.029	1.043	1.057	1.079	1.114	1.171	1.231	1.294
		 </tableData>
	 </table>
	</function>

	<table name="EnginePowerRPM_N1" type="internal">
		<description> Engine Power, function of RPM and N1 </description>
		<tableData>
						0		5		60		86		110
			0.0			0.0		0.4		0.4		0.4		0.4
			811.4		0.0		0.4		25.9	148.1	459
	 		1214.9		0.0		0.4		22.2	170.3	503.4
			1620.6		0.0		0.4		3.7		177.7	533
	 		2026.3		0.0		0.1		0.1		166.5	551.5
			2200		0.0		0.1		0.1		151.7	550
		</tableData>
	</table>

	<table name="ITT_N1" type="internal">
		<description> Inter-Turbine Temperature ITT [deg C] depending on N1 and engine run (0=off / 1=running) </description>
		<tableData>
					0		1
			0		0		0
			15		130	130
			110	400	1200
		</tableData>
	</table>

	<table name="CombustionEfficiency_N1" type="internal">
		<description>Dependency of fuel efficiency coefficient on N1 (and RPM)</description>
		<tableData>
			90		0.1221
			91.2	0.2834
			92.2	0.5336
			93.4	0.7188
			94.1	0.7741
			95.2	0.8471
			96.5	0.9
			100	1
		</tableData>
	</table>
</turboprop_engine>
