<?xml version="1.0"?>
<?xml-stylesheet type="text/xsl" href="http://jsbsim.sourceforge.net/JSBSim.xsl"?>

<fdm_config name="pc6-b2h2" version="2.0" release="ALPHA"
   xmlns:xsi="http://www.w3.org/2001/XMLSchema-instance"
   xsi:noNamespaceSchemaLocation="http://jsbsim.sourceforge.net/JSBSim.xsd">

 <fileheader>
  <author> Aeromatic v 3.3.15 </author>
  <filecreationdate> 11 Jun 2022 </filecreationdate>
  <version>$Revision: 1.80 $</version>
  <description> Models a pc6-b2h2. </description>
 </fileheader>

<!--
  File:     pc6-b2h2.xml
  Inputs:
    name:          pc6-b2h2
    type:          Single engine Glider, Small Commuter
    stall speed:   52.00kts
    max weight:    4850.00 lb
    length:        36.00 ft
    wing:
     span:         49.88 ft
     area:         310.00 sq-ft
     mean chord:   6.06 ft
     aspect ratio: 7.97:1
     taper ratio:  1.00:1
     incidence:    2.00 degrees
     dihedral:     1.00 degrees
     sweep:        0.00 degrees

    no. engines:   1
    engine type:   Turboprop Engine
    engine layout: forward fuselage

    gear type:     taildragger
    steering type: steering
    retractable?:  no

  Outputs:
    wing loading:       15.65 lb/sq-ft
     - thickness ratio: 18.01%
    payload:            1332.20 lbs
    CL-alpha:           5.06 per radian
    CL-0:               0.37
    CL-max:             1.71
    CD-0:               0.02
    K:                  0.04
    Mcrit:              0.70

    min. turn radius    132.17 ft
    max. turn rate:     0.73 deg/s
-->

	<metrics>
		<wingarea unit="FT2">310</wingarea>
		<wingspan unit="FT">49.88</wingspan>
		<wing_incidence unit="DEG">2</wing_incidence>
		<chord unit="FT">6.06</chord>
		<htailarea unit="FT2">19.8</htailarea>
		<htailarm unit="FT">22</htailarm>
		<vtailarea unit="FT2">16.7</vtailarea>
		<vtailarm unit="FT" >18.7</vtailarm>
		<location name="AERORP" unit="IN">
			<x>161.5</x>
			<y>0</y>
			<z>32.5</z>
		</location>

		<location name="EYEPOINT" unit="IN">
			<x>139.8</x>
			<y>-10.7</y>
			<z>23.8</z>
		</location>

		<location name="VRP" unit="IN">
			<x>0</x>
			<y>0</y>
			<z>0</z>
		</location>
	</metrics>

	<mass_balance>
		<ixx unit="SLUG*FT2">3000</ixx>
		<iyy unit="SLUG*FT2">2500</iyy>
		<izz unit="SLUG*FT2">3500</izz>
		<emptywt unit="LBS">2800</emptywt>

		<location name="CG" unit="IN">
			<x>166.35</x>
			<y>0</y>
			<z>0</z>
		</location>
		<!--<pointmass name="Payload">
			<description> 1332.20 LBS should bring model up to entered max weight </description>
			<weight unit="LBS"> 666.10 </weight>
			<location name="POINTMASS" unit="IN">
				<x>166.35 </x>
				<y>     0.00 </y>
				<z>   -10.80 </z>
			</location>
		</pointmass>-->
	</mass_balance>
	<propulsion>
		<engine file="Pratt-Whitney-PT6A-20">
			<location unit="IN">
				<x>85.1</x>
				<y>0</y>
				<z>0</z>
			</location>
			<orient unit="DEG">
				<pitch>-2.8</pitch>
				<roll>0</roll>
				<yaw>0</yaw>
			</orient>

			<feed>0</feed>
			<feed>1</feed>

			<thruster file="Hartzell-HC-B3TN-3C">
				<sense>1</sense>
				<location unit="IN">
					<x>11.7</x>
					<y>0</y>
					<z>0</z>
				</location>
				<orient unit="DEG">
					<pitch>-2.8</pitch>
					<roll>0</roll>
					<yaw>0</yaw>
				</orient>
			</thruster>
		</engine>

		<tank type="FUEL" number="0">
			<location unit="IN">
				<x>168.4</x>
				<y>-50</y>
				<z>32.1</z>
			</location>
			<type>JET-A</type>
			<capacity unit="LBS">561</capacity>
			<contents unit="LBS">280</contents>
		</tank>

		<tank type="FUEL" number="1">
			<location unit="IN">
				<x>168.4</x>
				<y>50</y>
				<z>32.1</z>
			</location>
			<type>JET-A</type>
			<capacity unit="LBS">561</capacity>
			<contents unit="LBS">280</contents>
		</tank>
	</propulsion>

	<ground_reactions>
		<contact type="BOGEY" name="Left main gear">
			<location unit="IN">
				<x>125.8</x>
				<y>-59</y>
				<z>-60.8</z>
			</location>

			<static_friction>0.8</static_friction>
			<dynamic_friction>0.5</dynamic_friction>
			<rolling_friction>0.02</rolling_friction>
			<spring_coeff unit="LBS/FT">4000</spring_coeff>
			<damping_coeff unit="LBS/FT/SEC">1000</damping_coeff>
			<max_steer unit="DEG">0</max_steer>
			<brake_group>LEFT</brake_group>
			<retractable>0</retractable>
		</contact>

		<contact type="BOGEY" name="Right main gear">
			<location unit="IN">
				<x>125.8</x>
				<y>59</y>
				<z>-60.8</z>
			</location>

			<static_friction>0.8</static_friction>
			<dynamic_friction>0.5</dynamic_friction>
			<rolling_friction>0.02</rolling_friction>
			<spring_coeff unit="LBS/FT">4000</spring_coeff>
			<damping_coeff unit="LBS/FT/SEC">1000</damping_coeff>
			<max_steer unit="DEG">0</max_steer>
			<brake_group>RIGHT</brake_group>
			<retractable>0</retractable>
		</contact>

		<contact type="BOGEY" name="Tail wheel">
			<location unit="IN">
				<x>423.3</x>
				<y>0</y>
				<z>-19.7</z>
			</location>

			<static_friction>0.8</static_friction>
			<dynamic_friction>0.5</dynamic_friction>
			<rolling_friction>0.02</rolling_friction>
			<spring_coeff unit="LBS/FT">2000</spring_coeff>
			<damping_coeff unit="LBS/FT/SEC">800</damping_coeff>
			<max_steer unit="DEG">25</max_steer>
			<brake_group>NONE</brake_group>
			<retractable>0</retractable>
		</contact>

		<contact type="STRUCTURE" name="Left forward wingtip">
			<location unit="IN">
				<x>142.5</x>
				<y>-319.8</y>
				<z>37.6</z>
			</location>

			<static_friction>1</static_friction>
			<dynamic_friction>1</dynamic_friction>
			<spring_coeff unit="LBS/FT">2000</spring_coeff>
			<damping_coeff unit="LBS/FT/SEC">2000</damping_coeff>
		</contact>

		<contact type="STRUCTURE" name="Right forward wingtip">
			<location unit="IN">
				<x>142.5</x>
				<y>319.8</y>
				<z>37</z>
			</location>

			<static_friction>1</static_friction>
			<dynamic_friction>1</dynamic_friction>
			<spring_coeff unit="LBS/FT">2000</spring_coeff>
			<damping_coeff unit="LBS/FT/SEC">2000</damping_coeff>
		</contact>

		<contact type="STRUCTURE" name="Left rear wingtip">
			<location unit="IN">
				<x>213.6</x>
				<y>-331.3</y>
				<z>40.8</z>
			</location>

			<static_friction>1</static_friction>
			<dynamic_friction>1</dynamic_friction>
			<spring_coeff unit="LBS/FT">2000</spring_coeff>
			<damping_coeff unit="LBS/FT/SEC">2000</damping_coeff>
		</contact>

		<contact type="STRUCTURE" name="Right rear wingtip">
			<location unit="IN">
				<x>213.6</x>
				<y>331.3</y>
				<z>40.8</z>
			</location>

			<static_friction>1</static_friction>
			<dynamic_friction>1</dynamic_friction>
			<spring_coeff unit="LBS/FT">2000</spring_coeff>
			<damping_coeff unit="LBS/FT/SEC">2000</damping_coeff>
		</contact>

		<contact type="STRUCTURE" name="Propeller spinner tip">
			<location unit="IN">
				<x>-0.8</x>
				<y>0</y>
				<z>-0.5</z>
			</location>

			<static_friction>1</static_friction>
			<dynamic_friction>1</dynamic_friction>
			<spring_coeff unit="LBS/FT">2000</spring_coeff>
			<damping_coeff unit="LBS/FT/SEC">2000</damping_coeff>
		</contact>

		<contact type="STRUCTURE" name="Vertical stabilizer">
			<location unit="IN">
				<x>357.1</x>
				<y>-319.8</y>
				<z>96</z>
			</location>

			<static_friction>1</static_friction>
			<dynamic_friction>1</dynamic_friction>
			<spring_coeff unit="LBS/FT">2000</spring_coeff>
			<damping_coeff unit="LBS/FT/SEC">2000</damping_coeff>
		</contact>

		<contact type="STRUCTURE" name="Rudder">
			<location unit="IN">
				<x>404.1</x>
				<y>0</y>
				<z>101.2</z>
			</location>

			<static_friction>1</static_friction>
			<dynamic_friction>1</dynamic_friction>
			<spring_coeff unit="LBS/FT">2000</spring_coeff>
			<damping_coeff unit="LBS/FT/SEC">2000</damping_coeff>
		</contact>

		<contact type="STRUCTURE" name="Left horizontal stabilizer">
			<location unit="IN">
				<x>373.5</x>
				<y>-88.1</y>
				<z>22</z>
			</location>

			<static_friction>1</static_friction>
			<dynamic_friction>1</dynamic_friction>
			<spring_coeff unit="LBS/FT">2000</spring_coeff>
			<damping_coeff unit="LBS/FT/SEC">2000</damping_coeff>
		</contact>

		<contact type="STRUCTURE" name="Right horizontal stabilizer">
			<location unit="IN">
				<x>373.5</x>
				<y>88.1</y>
				<z>22</z>
			</location>

			<static_friction>1</static_friction>
			<dynamic_friction>1</dynamic_friction>
			<spring_coeff unit="LBS/FT">2000</spring_coeff>
			<damping_coeff unit="LBS/FT/SEC">2000</damping_coeff>
		</contact>

		<contact type="STRUCTURE" name="Left elevator">
			<location unit="IN">
				<x>423</x>
				<y>-94.9</y>
				<z>19.7</z>
			</location>

			<static_friction>1</static_friction>
			<dynamic_friction>1</dynamic_friction>
			<spring_coeff unit="LBS/FT">2000</spring_coeff>
			<damping_coeff unit="LBS/FT/SEC">2000</damping_coeff>
		</contact>

		<contact type="STRUCTURE" name="Right elevator">
			<location unit="IN">
				<x>423</x>
				<y>94.9</y>
				<z>19.7</z>
			</location>

			<static_friction>1</static_friction>
			<dynamic_friction>1</dynamic_friction>
			<spring_coeff unit="LBS/FT">2000</spring_coeff>
			<damping_coeff unit="LBS/FT/SEC">2000</damping_coeff>
		</contact>

		<contact type="STRUCTURE" name="Tail tip">
			<location unit="IN">
				<x>420.4</x>
				<y>0</y>
				<z>19.7</z>
			</location>

			<static_friction>1</static_friction>
			<dynamic_friction>1</dynamic_friction>
			<spring_coeff unit="LBS/FT">2000</spring_coeff>
			<damping_coeff unit="LBS/FT/SEC">2000</damping_coeff>
		</contact>

		<contact type="STRUCTURE" name="Left upper windshield">
			<location unit="IN">
				<x>148.1</x>
				<y>-24.3</y>
				<z>36.9</z>
			</location>

			<static_friction>1</static_friction>
			<dynamic_friction>1</dynamic_friction>
			<spring_coeff unit="LBS/FT">2000</spring_coeff>
			<damping_coeff unit="LBS/FT/SEC">2000</damping_coeff>
		</contact>

		<contact type="STRUCTURE" name="Right upper windshield">
			<location unit="IN">
				<x>148.1</x>
				<y>24.3</y>
				<z>36.9</z>
			</location>

			<static_friction>1</static_friction>
			<dynamic_friction>1</dynamic_friction>
			<spring_coeff unit="LBS/FT">2000</spring_coeff>
			<damping_coeff unit="LBS/FT/SEC">2000</damping_coeff>
		</contact>
	</ground_reactions>

 <flight_control name="FCS: pc6-b2h2">

  <channel name="Pitch">
   <summer name="Pitch Trim Sum">
      <input>fcs/elevator-cmd-norm</input>
      <input>fcs/pitch-trim-cmd-norm</input>
      <clipto>
        <min> -1 </min>
        <max>  1 </max>
      </clipto>
   </summer>

   <aerosurface_scale name="Elevator Control">
      <input>fcs/pitch-trim-sum</input>
      <range>
        <min> -0.35 </min>
        <max>  0.35 </max>
      </range>
      <output>fcs/elevator-pos-rad</output>
   </aerosurface_scale>

   <aerosurface_scale name="Elevator Normalization">
      <input>fcs/elevator-pos-rad</input>
      <domain>
        <min> -0.35 </min>
        <max>  0.35 </max>
      </domain>
      <range>
        <min> -1 </min>
        <max>  1 </max>
      </range>
      <output>fcs/elevator-pos-norm</output>
   </aerosurface_scale>
  </channel>

  <channel name="Roll">
   <summer name="Roll Trim Sum">
      <input>fcs/aileron-cmd-norm</input>
      <input>fcs/roll-trim-cmd-norm</input>
      <clipto>
        <min> -1 </min>
        <max>  1 </max>
      </clipto>
   </summer>

   <aerosurface_scale name="Left Aileron Control">
      <input>fcs/roll-trim-sum</input>
      <range>
        <min> -0.35 </min>
        <max>  0.35 </max>
      </range>
      <output>fcs/left-aileron-pos-rad</output>
   </aerosurface_scale>

   <aerosurface_scale name="Right Aileron Control">
      <input>-fcs/roll-trim-sum</input>
      <range>
        <min> -0.35 </min>
        <max>  0.35 </max>
      </range>
      <output>fcs/right-aileron-pos-rad</output>
   </aerosurface_scale>

   <aerosurface_scale name="Left Aileron Normalization">
      <input>fcs/left-aileron-pos-rad</input>
      <domain>
        <min> -0.35 </min>
        <max>  0.35 </max>
      </domain>
      <range>
        <min> -1 </min>
        <max>  1 </max>
      </range>
      <output>fcs/left-aileron-pos-norm</output>
   </aerosurface_scale>

   <aerosurface_scale name="Right Aileron Normalization">
      <input>fcs/right-aileron-pos-rad</input>
      <domain>
        <min> -0.35 </min>
        <max>  0.35 </max>
      </domain>
      <range>
        <min> -1 </min>
        <max>  1 </max>
      </range>
      <output>fcs/right-aileron-pos-norm</output>
   </aerosurface_scale>
  </channel>

  <channel name="Yaw">
   <summer name="Rudder Command Sum">
      <input>fcs/rudder-cmd-norm</input>
      <input>fcs/yaw-trim-cmd-norm</input>
      <clipto>
        <min> -1 </min>
        <max>  1 </max>
      </clipto>
   </summer>

   <aerosurface_scale name="Rudder Control">
      <input>fcs/rudder-command-sum</input>
      <range>
        <min> -0.35 </min>
        <max>  0.35 </max>
      </range>
      <output>fcs/rudder-pos-rad</output>
   </aerosurface_scale>

   <aerosurface_scale name="Rudder Normalization">
      <input>fcs/rudder-pos-rad</input>
      <domain>
        <min> -0.35 </min>
        <max>  0.35 </max>
      </domain>
      <range>
        <min> -1 </min>
        <max>  1 </max>
      </range>
      <output>fcs/rudder-pos-norm</output>
   </aerosurface_scale>
  </channel>

  <channel name="Landing Gear">
   <switch name="fcs/gear-no-wow">
     <default value="1"/>
     <test logic="AND" value="0">
         gear/unit[1]/WOW eq 1
         gear/unit[2]/WOW eq 1
     </test>
   </switch>
  </channel>

  <channel name="Flaps">
   <kinematic name="Flaps Control">
    <input>fcs/flap-cmd-norm</input>
    <traverse>
      <setting>
         <position>  0 </position>
         <time>      0 </time>
      </setting>
      <setting>
         <position> 15 </position>
         <time>      4 </time>
      </setting>
      <setting>
         <position> 30 </position>
         <time>      3 </time>
      </setting>
    </traverse>
    <output>fcs/flap-pos-deg</output>
   </kinematic>

   <aerosurface_scale name="Flap Normalization">
    <input>fcs/flap-pos-deg</input>
    <domain>
      <min>  0 </min>
      <max> 30 </max>
    </domain>
    <range>
      <min> 0 </min>
      <max> 1 </max>
    </range>
    <output>fcs/flap-pos-norm</output>
   </aerosurface_scale>
  </channel>

 </flight_control>

 <aerodynamics>

  <axis name="LIFT">

    <function name="aero/force/Lift_propwash">
      <description>Delta lift due to propeller induced velocity</description>
      <product>
         <property>propulsion/engine[0]/thrust-coefficient</property>
          <property>aero/qbar-psf</property>
          <property>metrics/Sw-sqft</property>
          <table>
            <independentVar lookup="row">aero/alpha-rad</independentVar>
            <independentVar lookup="column">fcs/flap-pos-deg</independentVar>
            <tableData>
                     0.0     60.0
              -0.22  0.000   0.000
               0.00  0.059   0.158
               0.27  0.277   0.738
               0.55  0.000   0.000
            </tableData>
          </table>
      </product>
    </function>

    <!-- Lift above 0.85 and below -0.85 is generalised -->
    <function name="aero/force/Lift_alpha">
      <description>Lift due to alpha</description>
      <product>
          <property>aero/qbar-psf</property>
          <property>metrics/Sw-sqft</property>
          <table>
            <independentVar lookup="row">aero/alpha-rad</independentVar>
            <tableData>
              -1.57  0.0000
              -1.22 -0.5270
              -1.05 -0.7100
              -0.88 -0.8199
              -0.27 -0.3180
               0.00  0.3656
               0.34  1.7090
               0.41  0.6836
               0.88  1.1801
               1.05  1.0220
               1.22  0.7586
               1.57  0.0000
            </tableData>
          </table>
      </product>
    </function>

    <function name="aero/force/Lift_pitch_rate">
        <description>Lift due to pitch rate</description>
        <product>
          <property>aero/qbar-psf</property>
          <property>metrics/Sw-sqft</property>
          <property>velocities/q-aero-rad_sec</property>
          <property>aero/ci2vel</property>
          <value> 1.9111 </value>
        </product>
      </function>

      <function name="aero/force/Lift_alpha_rate">
        <description>Lift due to alpha rate</description>
        <product>
           <property>aero/qbar-psf</property>
           <property>metrics/Sw-sqft</property>
           <property>aero/alphadot-rad_sec</property>
           <property>aero/ci2vel</property>
           <value> 0.7667 </value>
        </product>
      </function>

    <function name="aero/force/Lift_elevator">
       <description>Lift due to Elevator Deflection</description>
       <product>
           <property>aero/qbar-psf</property>
           <property>metrics/Sw-sqft</property>
           <property>fcs/elevator-pos-rad</property>
           <value> 0.1713 </value>
       </product>
    </function>

    <function name="aero/force/Lift_flap">
       <description>Delta Lift due to flaps</description>
       <product>
           <property>aero/qbar-psf</property>
           <property>metrics/Sw-sqft</property>
           <property>fcs/flap-pos-deg</property>
           <value> 0.0123 </value>
       </product>
    </function>


  </axis>

  <axis name="DRAG">

    <!-- CD0 is based on fuselage, wing, horizontal- en vertical tail -->
    <!-- Antennas, struts and wires are not taken into account        -->
    <!-- CD for gear (fixed and retractable) is defined below         -->
    <function name="aero/force/Drag_minimum">
       <description>Minimum drag</description>
       <product>
          <property>aero/qbar-psf</property>
          <property>metrics/Sw-sqft</property>
          <value> 0.0218 </value>
       </product>
    </function>

    <function name="aero/force/Drag_alpha">
       <description>Drag due to alpha</description>
       <product>
          <property>aero/qbar-psf</property>
          <property>metrics/Sw-sqft</property>
          <table>
            <independentVar lookup="row">aero/alpha-rad</independentVar>
            <tableData>
             -1.57    1.4083
             -0.27    0.0409
              0.00    0.0000
              0.27    0.0409
              1.57    1.4083
            </tableData>
          </table>
       </product>
    </function>

    <function name="aero/force/Drag_induced">
       <description>Induced drag</description>
         <product>
           <property>aero/qbar-psf</property>
           <property>metrics/Sw-sqft</property>
           <property>aero/cl-squared</property>
           <value> 0.0416 </value>
         </product>
    </function>

    <function name="aero/force/Drag_mach">
       <description>Drag due to mach</description>
        <product>
          <property>aero/qbar-psf</property>
          <property>metrics/Sw-sqft</property>
          <table>
            <independentVar lookup="row">velocities/mach</independentVar>
            <tableData>
                0.00    0.0000
                0.70    0.0000
                1.10    0.0230
                1.80    0.0150
            </tableData>
          </table>
        </product>
    </function>

    <function name="aero/force/Drag_beta">
       <description>Drag due to sideslip</description>
       <product>
          <property>aero/qbar-psf</property>
          <property>metrics/Sw-sqft</property>
          <table>
            <independentVar lookup="row">aero/beta-rad</independentVar>
            <tableData>
              -1.57    1.2300
              -0.26    0.0500
               0.00    0.0000
               0.26    0.0500
               1.57    1.2300
            </tableData>
          </table>
       </product>
    </function>

    <function name="aero/force/Drag_elevator">
       <description>Drag due to Elevator Deflection</description>
       <product>
           <property>aero/qbar-psf</property>
           <property>metrics/Sw-sqft</property>
           <abs><property>fcs/elevator-pos-rad</property></abs>
           <value> 0.0400 </value>
       </product>
    </function>

    <function name="aero/force/Drag_gear">
       <description>Drag due to gear</description>
         <product>
           <property>aero/qbar-psf</property>
           <property>metrics/Sw-sqft</property>
           <value> 0.0040 </value>
         </product>
    </function>

    <function name="aero/force/Drag_flap">
       <description>Drag due to flaps</description>
         <product>
           <property>aero/qbar-psf</property>
           <property>metrics/Sw-sqft</property>
           <property>fcs/flap-pos-deg</property>
           <value> 0.0009 </value>
         </product>
    </function>


  </axis>

  <axis name="SIDE">

    <function name="aero/force/Side_beta">
       <description>Side force due to beta</description>
       <product>
           <property>aero/qbar-psf</property>
           <property>metrics/Sw-sqft</property>
           <property>aero/beta-rad</property>
           <value> -0.2534 </value>
       </product>
    </function>
    <function name="aero/force/Side_roll_rate">
       <description>Side force due to roll rate</description>
       <product>
           <property>aero/qbar-psf</property>
           <property>metrics/Sw-sqft</property>
           <property>aero/bi2vel</property>
           <property>velocities/p-aero-rad_sec</property>
           <table>
             <independentVar lookup="row">aero/Re</independentVar>
             <tableData>
                 3389233   0.3194
                 3728156   0.0272
                 5083849   0.0121
                 6763406   0.0068
             </tableData>
           </table>
       </product>
    </function>

    <function name="aero/force/Side_yaw_rate">
       <description>Side force due to yaw rate</description>
       <product>
           <property>aero/qbar-psf</property>
           <property>metrics/Sw-sqft</property>
           <property>aero/bi2vel</property>
           <property>velocities/r-aero-rad_sec</property>
           <value> 0.1900 </value>
       </product>
    </function>

    <function name="aero/force/Side_rudder">
       <description>Side force due to rudder</description>
       <product>
           <property>aero/qbar-psf</property>
           <property>metrics/Sw-sqft</property>
           <property>fcs/rudder-pos-rad</property>
           <value> 0.0758 </value>
       </product>
    </function>

  </axis>

  <axis name="PITCH">

    <function name="aero/moment/Pitch_propwash">
      <description>Pitch moment due to propeller induced velocity</description>
      <product>
          <property>propulsion/engine[0]/thrust-coefficient</property>
          <property>aero/qbar-psf</property>
          <property>metrics/Sw-sqft</property>
          <property>metrics/bw-ft</property>
          <table>
            <independentVar lookup="row">aero/alpha-rad</independentVar>
            <independentVar lookup="column">fcs/flap-pos-deg</independentVar>
            <tableData>
                     0.0     60.0
              -0.01  0.000   0.000
               0.00  0.014   0.037
               0.27  0.064   0.171
               0.36  0.000   0.000
            </tableData>
          </table>
      </product>
    </function>

    <function name="aero/moment/Pitch_alpha">
       <description>Pitch moment due to alpha</description>
       <product>
           <property>aero/qbar-psf</property>
           <property>metrics/Sw-sqft</property>
           <property>metrics/cbarw-ft</property>
           <property>aero/alpha-rad</property>
           <value> -0.4966 </value>
       </product>
    </function>

    <function name="aero/moment/Pitch_elevator">
       <description>Pitch moment due to elevator</description>
       <product>
          <property>aero/qbar-psf</property>
          <property>metrics/Sw-sqft</property>
          <property>metrics/cbarw-ft</property>
          <property>fcs/elevator-pos-rad</property>
          <table>
            <independentVar lookup="row">velocities/mach</independentVar>
            <tableData>
              0.0    -0.6148
              2.0    -0.1537
            </tableData>
          </table>
       </product>
    </function>

    <function name="aero/moment/Pitch_damp">
       <description>Pitch moment due to pitch rate</description>
       <product>
           <property>aero/qbar-psf</property>
           <property>metrics/Sw-sqft</property>
           <property>metrics/cbarw-ft</property>
           <property>aero/ci2vel</property>
           <property>velocities/q-aero-rad_sec</property>
           <value> -6.9379 </value>
       </product>
    </function>

    <function name="aero/moment/Pitch_alphadot">
       <description>Pitch moment due to alpha rate</description>
       <product>
           <property>aero/qbar-psf</property>
           <property>metrics/Sw-sqft</property>
           <property>metrics/cbarw-ft</property>
           <property>aero/ci2vel</property>
           <property>aero/alphadot-rad_sec</property>
           <value> -2.7835 </value>
       </product>
    </function>

  </axis>

  <axis name="ROLL">

    <function name="aero/moment/Roll_differential_propwash">
       <description>Roll moment due to differential propwash</description>
       <product>
           <property>propulsion/engine[0]/thrust-coefficient</property>
           <property>aero/qbar-psf</property>
           <property>metrics/Sw-sqft</property>
           <property>metrics/bw-ft</property>
           <property>aero/alpha-rad</property>
           <value> 0.1285 </value>
       </product>
    </function>

    <function name="aero/moment/Roll_beta">
       <description>Roll moment due to beta</description>
       <product>
           <property>aero/qbar-psf</property>
           <property>metrics/Sw-sqft</property>
           <property>metrics/bw-ft</property>
           <property>aero/beta-rad</property>
           <property>fcs/gear-no-wow</property>
           <table>
             <independentVar lookup="row">aero/alpha-rad</independentVar>
             <independentVar lookup="column">aero/Re</independentVar>
             <tableData>
                          3389233  3728156  5083849  6763406
                 -0.0349  -0.3154  -0.0520  -0.0384  -0.0336
                  0.3491  -0.3154  -0.0520  -0.0384  -0.0336
             </tableData>
           </table>
       </product>
    </function>

    <function name="aero/moment/Roll_damp">
       <description>Roll moment due to roll rate</description>
       <product>
           <property>aero/qbar-psf</property>
           <property>metrics/Sw-sqft</property>
           <property>metrics/bw-ft</property>
           <property>aero/bi2vel</property>
           <property>velocities/p-aero-rad_sec</property>
           <value> -0.7506 </value>
       </product>
    </function>

    <function name="aero/moment/Roll_yaw">
       <description>Roll moment due to yaw rate</description>
       <product>
           <property>aero/qbar-psf</property>
           <property>metrics/Sw-sqft</property>
           <property>metrics/bw-ft</property>
           <property>aero/bi2vel</property>
           <property>velocities/r-aero-rad_sec</property>
           <table>
             <independentVar lookup="row">aero/alpha-rad</independentVar>
             <independentVar lookup="column">aero/Re</independentVar>
             <tableData>
                          3389233  3728156  5083849  6763406
                 -0.0349   0.0434   0.0434   0.0434   0.0434
                  0.3491   4.2687   0.5294   0.5294   0.5294
             </tableData>
           </table>
       </product>
    </function>

    <function name="aero/moment/Roll_aileron">
       <description>Roll moment due to aileron</description>
       <product>
          <property>aero/qbar-psf</property>
          <property>metrics/Sw-sqft</property>
          <property>metrics/bw-ft</property>
          <property>fcs/left-aileron-pos-rad</property>
           <table>
            <independentVar lookup="row">velocities/mach</independentVar>
            <tableData>
              0.0    0.1700
              2.0    0.0425
            </tableData>
          </table>
       </product>
    </function>

    <function name="aero/moment/Roll_rudder">
       <description>Roll moment due to rudder</description>
       <product>
           <property>aero/qbar-psf</property>
           <property>metrics/Sw-sqft</property>
           <property>metrics/bw-ft</property>
           <property>fcs/rudder-pos-rad</property>
           <value> 0.0100 </value>
       </product>
    </function>

  </axis>

  <axis name="YAW">

    <!-- Stall initiator -->
    <function name="aero/moment/Yaw_alpha">
       <description>Yaw moment due to alpha</description>
       <product>
           <property>aero/qbar-psf</property>
           <property>metrics/Sw-sqft</property>
           <property>metrics/bw-ft</property>
           <property>aero/alpha-rad</property>
           <property>fcs/gear-no-wow</property>
           <table>
             <independentVar lookup="row">aero/beta-rad</independentVar>
             <independentVar lookup="column">aero/Re</independentVar>
             <tableData>
                          3389233  3728156
                 -0.3491  -1.0000   0.0000
                  0.3491   1.0000   0.0000
             </tableData>
           </table>
       </product>
    </function>

    <function name="aero/moment/Yaw_beta">
       <description>Yaw moment due to beta</description>
       <product>
           <property>aero/qbar-psf</property>
           <property>metrics/Sw-sqft</property>
           <property>metrics/bw-ft</property>
           <property>aero/beta-rad</property>
           <value> 0.0456 </value>
       </product>
    </function>

    <function name="aero/moment/Yaw_roll_rate">
       <description>Yaw moment due to roll rate</description>
       <product>
           <property>aero/qbar-psf</property>
           <property>metrics/Sw-sqft</property>
           <property>metrics/bw-ft</property>
           <property>aero/bi2vel</property>
           <property>velocities/p-rad_sec</property>
           <table>
             <independentVar lookup="row">aero/Re</independentVar>
             <tableData>
                 3389233  -0.1197
                 3728156  -0.0102
                 5083849  -0.0045
                 6763406  -0.0026
             </tableData>
           </table>
       </product>
    </function>

    <function name="aero/moment/Yaw_damp">
       <description>Yaw moment due to yaw rate</description>
       <product>
           <property>aero/qbar-psf</property>
           <property>metrics/Sw-sqft</property>
           <property>metrics/bw-ft</property>
           <property>aero/bi2vel</property>
           <property>velocities/r-aero-rad_sec</property>
           <value> -0.0494 </value>
       </product>
    </function>

    <function name="aero/moment/Yaw_rudder">
       <description>Yaw moment due to rudder</description>
       <product>
           <property>aero/qbar-psf</property>
           <property>metrics/Sw-sqft</property>
           <property>metrics/bw-ft</property>
           <property>fcs/rudder-pos-rad</property>
           <value> -0.0284 </value>
       </product>
    </function>

    <function name="aero/moment/Yaw_aileron">
       <description>Adverse yaw</description>
       <product>
           <property>aero/qbar-psf</property>
           <property>metrics/Sw-sqft</property>
           <property>metrics/bw-ft</property>
           <property>fcs/left-aileron-pos-rad</property>
           <value> -0.0100 </value>
       </product>
    </function>

  </axis>

 </aerodynamics>

 <external_reactions>
 </external_reactions>

</fdm_config>
