<?xml version="1.0"?>
<?xml-stylesheet type="text/xsl" href="http://jsbsim.sourceforge.net/JSBSim.xsl"?>

<fdm_config name="pc6-b2h2" version="2.0" release="ALPHA"
   xmlns:xsi="http://www.w3.org/2001/XMLSchema-instance"
   xsi:noNamespaceSchemaLocation="http://jsbsim.sourceforge.net/JSBSim.xsd">

 <fileheader>
  <author> Aeromatic v 3.3.15 </author>
  <filecreationdate> 11 Jun 2022 </filecreationdate>
  <version>$Revision: 1.80 $</version>
  <description> Models a pc6-b2h2. </description>
 </fileheader>

<!--
  File:     pc6-b2h2.xml
  Inputs:
    name:          pc6-b2h2
    type:          Single engine Glider, Small Commuter
    stall speed:   52.00kts
    max weight:    4850.00 lb
    length:        36.00 ft
    wing:
     span:         49.88 ft
     area:         310.00 sq-ft
     mean chord:   6.06 ft
     aspect ratio: 7.97:1
     taper ratio:  1.00:1
     incidence:    2.00 degrees
     dihedral:     1.00 degrees
     sweep:        0.00 degrees

    no. engines:   1
    engine type:   Turboprop Engine
    engine layout: forward fuselage

    gear type:     taildragger
    steering type: steering
    retractable?:  no

  Outputs:
    wing loading:       15.65 lb/sq-ft
     - thickness ratio: 18.01%
    payload:            1332.20 lbs
    CL-alpha:           5.06 per radian
    CL-0:               0.37
    CL-max:             1.71
    CD-0:               0.02
    K:                  0.04
    Mcrit:              0.70

    min. turn radius    132.17 ft
    max. turn rate:     0.73 deg/s
-->

	<metrics>
		<wingarea unit="FT2">310</wingarea>
		<wingspan unit="FT">49.88</wingspan>
		<wing_incidence unit="DEG">2</wing_incidence>
		<chord unit="FT">6.22</chord>
		<htailarea unit="FT2">19.8</htailarea>
		<htailarm unit="FT">22</htailarm>
		<vtailarea unit="FT2">16.7</vtailarea>
		<vtailarm unit="FT" >18.7</vtailarm>
		<location name="AERORP" unit="IN">
			<x>202.88</x>
			<y>0</y>
			<z>17.14</z>
		</location>

		<location name="EYEPOINT" unit="IN">
			<x>139.8</x>
			<y>-10.7</y>
			<z>23.8</z>
		</location>

		<location name="VRP" unit="IN">
			<x>0</x>
			<y>0</y>
			<z>0</z>
		</location>
	</metrics>

	<mass_balance>
		<ixx unit="SLUG*FT2">9152</ixx>
		<iyy unit="SLUG*FT2">7187</iyy>
		<izz unit="SLUG*FT2">15814</izz>
		<ixz unit="SLUG*FT2">261</ixz>
		<emptywt unit="LBS">2800</emptywt>

		<location name="CG" unit="IN">
			<x>185</x>
			<y>0</y>
			<z>16</z>
		</location>
		<pointmass name="Pilot">
			<weight unit="LBS">150</weight>
			<location name="POINTMASS" unit="IN">
				<x>139.4</x>
				<y>-11</y>
				<z>0</z>
			</location>
		</pointmass>

		<pointmass name="Copilot">
			<weight unit="LBS">150</weight>
			<location name="POINTMASS" unit="IN">
				<x>139.4</x>
				<y>11</y>
				<z>0</z>
			</location>
		</pointmass>

		<pointmass name="First on bench">
			<weight unit="LBS">150</weight>
			<location name="POINTMASS" unit="IN">
				<x>166.5</x>
				<y>-11</y>
				<z>-5.1</z>
			</location>
		</pointmass>

		<pointmass name="Second on bench">
			<weight unit="LBS">150</weight>
			<location name="POINTMASS" unit="IN">
				<x>184.3</x>
				<y>-11</y>
				<z>-5.1</z>
			</location>
		</pointmass>

		<pointmass name="Third on bench">
			<weight unit="LBS">150</weight>
			<location name="POINTMASS" unit="IN">
				<x>196.9</x>
				<y>-11</y>
				<z>-5.1</z>
			</location>
		</pointmass>

		<pointmass name="Before cave">
			<weight unit="LBS">150</weight>
			<location name="POINTMASS" unit="IN">
				<x>216.1</x>
				<y>-11</y>
				<z>-5.1</z>
			</location>
		</pointmass>

		<pointmass name="Cave">
			<weight unit="LBS">150</weight>
			<location name="POINTMASS" unit="IN">
				<x>233.1</x>
				<y>-11</y>
				<z>-5.1</z>
			</location>
		</pointmass>

		<pointmass name="Largeur">
			<weight unit="LBS">150</weight>
			<location name="POINTMASS" unit="IN">
				<x>155.9</x>
				<y>11</y>
				<z>-14.6</z>
			</location>
		</pointmass>

		<pointmass name="Mid on floor">
			<weight unit="LBS">150</weight>
			<location name="POINTMASS" unit="IN">
				<x>184.6</x>
				<y>-11</y>
				<z>-5.1</z>
			</location>
		</pointmass>

		<pointmass name="Last on floor">
			<weight unit="LBS">150</weight>
			<location name="POINTMASS" unit="IN">
				<x>211.8</x>
				<y>-11</y>
				<z>-5.1</z>
			</location>
		</pointmass>
	</mass_balance>

	<propulsion>
		<engine file="Pratt-Whitney-PT6A-27">
			<!--<location unit="IN">
				<x>85.1</x>
				<y>0</y>
				<z>0</z>
			</location>
			<orient unit="DEG">
				<pitch>-2.8</pitch>
				<roll>0</roll>
				<yaw>0</yaw>
			</orient>-->
			<feed>0</feed>
			<feed>1</feed>

			<thruster file="Hartzell-HC-B3TN-3C">
				<sense>1</sense>
				<location unit="IN">
					<x>11.7</x>
					<y>0</y>
					<z>0</z>
				</location>
				<orient unit="DEG">
					<pitch>-2.8</pitch>
					<roll>0</roll>
					<yaw>0</yaw>
				</orient>
			</thruster>
		</engine>

		<tank type="FUEL" number="0">
			<location unit="IN">
				<x>168.4</x>
				<y>-50</y>
				<z>32.1</z>
			</location>
			<type>JET-A</type>
			<capacity unit="LBS">561</capacity>
			<contents unit="LBS">280</contents>
		</tank>

		<tank type="FUEL" number="1">
			<location unit="IN">
				<x>168.4</x>
				<y>50</y>
				<z>32.1</z>
			</location>
			<type>JET-A</type>
			<capacity unit="LBS">561</capacity>
			<contents unit="LBS">280</contents>
		</tank>
	</propulsion>

	<ground_reactions>
		<contact type="BOGEY" name="Left main gear">
			<location unit="IN">
				<x>125.8</x>
				<y>-59</y>
				<z>-60.8</z>
			</location>

			<static_friction>0.8</static_friction>
			<dynamic_friction>0.5</dynamic_friction>
			<rolling_friction>0.02</rolling_friction>
			<spring_coeff unit="LBS/FT">5000</spring_coeff>
			<damping_coeff unit="LBS/FT/SEC">600</damping_coeff>
			<max_steer unit="DEG">0</max_steer>
			<brake_group>LEFT</brake_group>
			<retractable>0</retractable>
		</contact>

		<contact type="BOGEY" name="Right main gear">
			<location unit="IN">
				<x>125.8</x>
				<y>59</y>
				<z>-60.8</z>
			</location>

			<static_friction>0.8</static_friction>
			<dynamic_friction>0.5</dynamic_friction>
			<rolling_friction>0.02</rolling_friction>
			<spring_coeff unit="LBS/FT">5000</spring_coeff>
			<damping_coeff unit="LBS/FT/SEC">600</damping_coeff>
			<max_steer unit="DEG">0</max_steer>
			<brake_group>RIGHT</brake_group>
			<retractable>0</retractable>
		</contact>

		<contact type="BOGEY" name="Tail wheel">
			<location unit="IN">
				<x>423.3</x>
				<y>0</y>
				<z>-19.7</z>
			</location>

			<static_friction>0.8</static_friction>
			<dynamic_friction>0.5</dynamic_friction>
			<rolling_friction>0.02</rolling_friction>
			<spring_coeff unit="LBS/FT">3000</spring_coeff>
			<damping_coeff unit="LBS/FT/SEC">500</damping_coeff>
			<max_steer unit="DEG">25</max_steer>
			<brake_group>NONE</brake_group>
			<retractable>0</retractable>
		</contact>

		<contact type="STRUCTURE" name="Left forward wingtip">
			<location unit="IN">
				<x>142.5</x>
				<y>-319.8</y>
				<z>37.6</z>
			</location>

			<static_friction>1</static_friction>
			<dynamic_friction>1</dynamic_friction>
			<spring_coeff unit="LBS/FT">1000</spring_coeff>
			<damping_coeff unit="LBS/FT/SEC">1000</damping_coeff>
		</contact>

		<contact type="STRUCTURE" name="Right forward wingtip">
			<location unit="IN">
				<x>142.5</x>
				<y>319.8</y>
				<z>37</z>
			</location>

			<static_friction>1</static_friction>
			<dynamic_friction>1</dynamic_friction>
			<spring_coeff unit="LBS/FT">1000</spring_coeff>
			<damping_coeff unit="LBS/FT/SEC">1000</damping_coeff>
		</contact>

		<contact type="STRUCTURE" name="Left rear wingtip">
			<location unit="IN">
				<x>213.6</x>
				<y>-331.3</y>
				<z>40.8</z>
			</location>

			<static_friction>1</static_friction>
			<dynamic_friction>1</dynamic_friction>
			<spring_coeff unit="LBS/FT">1000</spring_coeff>
			<damping_coeff unit="LBS/FT/SEC">1000</damping_coeff>
		</contact>

		<contact type="STRUCTURE" name="Right rear wingtip">
			<location unit="IN">
				<x>213.6</x>
				<y>331.3</y>
				<z>40.8</z>
			</location>

			<static_friction>1</static_friction>
			<dynamic_friction>1</dynamic_friction>
			<spring_coeff unit="LBS/FT">1000</spring_coeff>
			<damping_coeff unit="LBS/FT/SEC">1000</damping_coeff>
		</contact>

		<contact type="STRUCTURE" name="Propeller spinner tip">
			<location unit="IN">
				<x>-0.8</x>
				<y>0</y>
				<z>-0.5</z>
			</location>

			<static_friction>1</static_friction>
			<dynamic_friction>1</dynamic_friction>
			<spring_coeff unit="LBS/FT">1000</spring_coeff>
			<damping_coeff unit="LBS/FT/SEC">1000</damping_coeff>
		</contact>

		<contact type="STRUCTURE" name="Vertical stabilizer">
			<location unit="IN">
				<x>357.1</x>
				<y>-319.8</y>
				<z>96</z>
			</location>

			<static_friction>1</static_friction>
			<dynamic_friction>1</dynamic_friction>
			<spring_coeff unit="LBS/FT">500</spring_coeff>
			<damping_coeff unit="LBS/FT/SEC">1000</damping_coeff>
		</contact>

		<contact type="STRUCTURE" name="Rudder">
			<location unit="IN">
				<x>404.1</x>
				<y>0</y>
				<z>101.2</z>
			</location>

			<static_friction>1</static_friction>
			<dynamic_friction>1</dynamic_friction>
			<spring_coeff unit="LBS/FT">500</spring_coeff>
			<damping_coeff unit="LBS/FT/SEC">1000</damping_coeff>
		</contact>

		<contact type="STRUCTURE" name="Left horizontal stabilizer">
			<location unit="IN">
				<x>373.5</x>
				<y>-88.1</y>
				<z>22</z>
			</location>

			<static_friction>1</static_friction>
			<dynamic_friction>1</dynamic_friction>
			<spring_coeff unit="LBS/FT">500</spring_coeff>
			<damping_coeff unit="LBS/FT/SEC">1000</damping_coeff>
		</contact>

		<contact type="STRUCTURE" name="Right horizontal stabilizer">
			<location unit="IN">
				<x>373.5</x>
				<y>88.1</y>
				<z>22</z>
			</location>

			<static_friction>1</static_friction>
			<dynamic_friction>1</dynamic_friction>
			<spring_coeff unit="LBS/FT">500</spring_coeff>
			<damping_coeff unit="LBS/FT/SEC">1000</damping_coeff>
		</contact>

		<contact type="STRUCTURE" name="Left elevator">
			<location unit="IN">
				<x>423</x>
				<y>-94.9</y>
				<z>19.7</z>
			</location>

			<static_friction>1</static_friction>
			<dynamic_friction>1</dynamic_friction>
			<spring_coeff unit="LBS/FT">500</spring_coeff>
			<damping_coeff unit="LBS/FT/SEC">1000</damping_coeff>
		</contact>

		<contact type="STRUCTURE" name="Right elevator">
			<location unit="IN">
				<x>423</x>
				<y>94.9</y>
				<z>19.7</z>
			</location>

			<static_friction>1</static_friction>
			<dynamic_friction>1</dynamic_friction>
			<spring_coeff unit="LBS/FT">500</spring_coeff>
			<damping_coeff unit="LBS/FT/SEC">1000</damping_coeff>
		</contact>

		<contact type="STRUCTURE" name="Tail tip">
			<location unit="IN">
				<x>420.4</x>
				<y>0</y>
				<z>19.7</z>
			</location>

			<static_friction>1</static_friction>
			<dynamic_friction>1</dynamic_friction>
			<spring_coeff unit="LBS/FT">500</spring_coeff>
			<damping_coeff unit="LBS/FT/SEC">1000</damping_coeff>
		</contact>

		<contact type="STRUCTURE" name="Left upper windshield">
			<location unit="IN">
				<x>148.1</x>
				<y>-24.3</y>
				<z>36.9</z>
			</location>

			<static_friction>1</static_friction>
			<dynamic_friction>1</dynamic_friction>
			<spring_coeff unit="LBS/FT">1000</spring_coeff>
			<damping_coeff unit="LBS/FT/SEC">1000</damping_coeff>
		</contact>

		<contact type="STRUCTURE" name="Right upper windshield">
			<location unit="IN">
				<x>148.1</x>
				<y>24.3</y>
				<z>36.9</z>
			</location>

			<static_friction>1</static_friction>
			<dynamic_friction>1</dynamic_friction>
			<spring_coeff unit="LBS/FT">1000</spring_coeff>
			<damping_coeff unit="LBS/FT/SEC">1000</damping_coeff>
		</contact>
	</ground_reactions>

	<flight_control name="FCS: PC-6">
		<channel name="Pitch">
			<summer>
				<input>fcs/elevator-cmd-norm</input>
				<input>fcs/pitch-trim-cmd-norm</input>
				<clipto>
					<min>-1</min>
					<max>1</max>
				</clipto>
				<output>fcs/pitch-trim-sum</output>
			</summer>

			<aerosurface_scale>
				<input>fcs/pitch-trim-sum</input>
				<range>
					<min>-25</min>
					<max>15</max>
				</range>
				<output>fcs/elevator-pos-deg</output>
			</aerosurface_scale>

			<aerosurface_scale>
				<input>fcs/elevator-pos-deg</input>
				<domain>
					<min>-25</min>
					<max>15</max>
				</domain>
				<range>
					<min>-1</min>
					<max>1</max>
				</range>
				<output>fcs/elevator-pos-norm</output>
			</aerosurface_scale>
		</channel>
		<channel name="Roll">
			<summer>
				<input>fcs/aileron-cmd-norm</input>
				<input>fcs/roll-trim-cmd-norm</input>
				<clipto>
					<min>-1</min>
					<max>1</max>
				</clipto>
				<output>fcs/roll-trim-sum</output>
			</summer>

			<aerosurface_scale name="Left Aileron Control">
				<input>fcs/roll-trim-sum</input>
				<range>
					<min>-15</min>
					<max>25</max>
				</range>
				<output>fcs/left-aileron-pos-deg</output>
			</aerosurface_scale>

			<aerosurface_scale>
				<input>-fcs/roll-trim-sum</input>
				<range>
					<min>-15</min>
					<max>25</max>
				</range>
				<output>fcs/right-aileron-pos-deg</output>
			</aerosurface_scale>

			<aerosurface_scale>
				<input>fcs/left-aileron-pos-deg</input>
				<domain>
					<min>-15</min>
					<max>25</max>
				</domain>
				<range>
					<min>-1</min>
					<max>1</max>
				</range>
				<output>fcs/left-aileron-pos-norm</output>
			</aerosurface_scale>

			<aerosurface_scale>
				<input>fcs/right-aileron-pos-deg</input>
				<domain>
					<min>-15</min>
					<max>25</max>
				</domain>
				<range>
					<min>-1</min>
					<max>1</max>
				</range>
				<output>fcs/right-aileron-pos-norm</output>
			</aerosurface_scale>

			<fcs_function>
				<function>
					<quotient>
						<sum>
							<property>fcs/left-aileron-pos-deg</property>
							<property>-fcs/right-aileron-pos-deg</property>
						</sum>
						<value>2</value>
					</quotient>
				</function>
				<output>fcs/aileron-pos-deg</output>
			</fcs_function>

			<fcs_function>
				<function>
					<toradians>
						<property>fcs/aileron-pos-deg</property>
					</toradians>
				</function>
				<output>fcs/aileron-pos-rad</output>
			</fcs_function>

			<aerosurface_scale>
				<input>fcs/aileron-pos-deg</input>
				<domain>
					<min>-20</min>
					<max>20</max>
				</domain>
				<range>
					<min>-1</min>
					<max>1</max>
				</range>
				<output>fcs/aileron-pos-norm</output>
			</aerosurface_scale>
		</channel>

		<channel name="Yaw">
			<pure_gain>
				<input>/controls/flight/rudder</input>
				<gain>-1</gain>
				<output>fcs/steer-cmd-norm</output>
			</pure_gain>

			<summer>
				<input>fcs/rudder-cmd-norm</input>
				<input>fcs/yaw-trim-cmd-norm</input>
				<clipto>
					<min>-1</min>
					<max>1</max>
				</clipto>
				<output>fcs/rudder-command-sum</output>
			</summer>

			<aerosurface_scale>
				<input>fcs/rudder-command-sum</input>
				<range>
					<min>-30</min>
					<max>30</max>
				</range>
				<output>fcs/rudder-pos-deg</output>
			</aerosurface_scale>

			<aerosurface_scale>
				<input>fcs/rudder-pos-deg</input>
				<domain>
					<min>-30</min>
					<max>30</max>
				</domain>
				<range>
					<min>-1</min>
					<max>1</max>
				</range>
				<output>fcs/rudder-pos-norm</output>
			</aerosurface_scale>
		</channel>

		<channel name="Flaps">
			<aerosurface_scale>
				<input>fcs/flap-cmd-norm</input>
				<domain>
					<min>0</min>
					<max>1</max>
				</domain>
				<range>
					<min>0</min>
					<max>38</max>
				</range>
				<output>fcs/flap-pos-deg</output>
			</aerosurface_scale>

			<aerosurface_scale>
				<input>fcs/flap-pos-deg</input>
				<domain>
					<min>0</min>
					<max>38</max>
				</domain>
				<range>
					<min>0</min>
					<max>1</max>
				</range>
				<output>fcs/flap-pos-norm</output>
			</aerosurface_scale>
		</channel>
	</flight_control>

	<system file="pt6a-27"/>

	<hysteresis_limits unit="DEG">
		<min>5</min>
		<max>15</max>
	</hysteresis_limits>

	<aerodynamics>
		<function name="aero/function/kCDge">
			<description>Change in drag due to ground effect</description>
			<table>
				<independentVar>aero/h_b-mac-ft</independentVar>
				<tableData>
					  0.0000	0.4800
					  0.1000	0.5150
					  0.1500	0.6290
					  0.2000	0.7090
					  0.3000	0.8150
					  0.4000	0.8820
					  0.5000	0.9280
					  0.6000	0.9620
					  0.7000	0.9880
					  0.8000	1.0000
					  0.9000	1.0000
					  1.0000	1.0000
					  1.1000	1.0000
				  </tableData>
			</table>
		</function>

		<function name="aero/function/kCLge">
			<description>Change in lift due to ground effect</description>
			<table>
				<independentVar>aero/h_b-mac-ft</independentVar>
				<tableData>
					0.0000	1.2030
					0.1000	1.1270
					0.1500	1.0900
					0.2000	1.0730
					0.3000	1.0460
					0.4000	1.0280
					0.5000	1.0190
					0.6000	1.0130
					0.7000	1.0080
					0.8000	1.0060
					0.9000	1.0030
					1.0000	1.0020
					1.1000	1.0000
				</tableData>
			</table>
		</function>

		<function name="aero/function/Alpha_Beta_Csurf_Reversal">
			<description>Factor for force and moment coefficients for control surfaces, to simulate ineffectivity / reversal at high alphas and betas</description>
			<product>
				<table>
					<independentVar>aero/alpha-deg</independentVar>
					<tableData>
						-180	-1
						-90		0
						0		1
						90		0
						180	-1
					</tableData>
				</table>
				<table>
					<independentVar>aero/beta-deg</independentVar>
					<tableData>
						-180	-1
						-90		0
						0		1
						90		0
						180	-1
					</tableData>
				</table>
			</product>
		</function>

		<axis name="LIFT">
			<function name="aero/force/Lift_propwash">
				<description>Delta lift due to propeller induced velocity</description>
				<product>
					<property>propulsion/engine[0]/thrust-coefficient</property>
					<property>aero/qbar-psf</property>
					<property>metrics/Sw-sqft</property>
					<table>
						<independentVar lookup="row">aero/alpha-rad</independentVar>
						<independentVar lookup="column">fcs/flap-pos-deg</independentVar>
						<tableData>
									0		60
							-0.22	0		0
							0.00	0.059	0.158
							0.27	0.277	0.738
							0.55	0		0
						</tableData>
					</table>
				</product>
			</function>

			<function name="aero/force/Lift_alpha">
				<description>Lift due to alpha</description>
				<product>
					<property>aero/qbar-psf</property>
					<property>metrics/Sw-sqft</property>
					<property>aero/function/kCLge</property>
					<table>
						<independentVar lookup="row">aero/alpha-deg</independentVar>
						<independentVar lookup="column">aero/beta-deg</independentVar>
						<tableData>
									-30.0		-10.0		0.0			10.0		30.0
							-15.0	-0.633347	-0.881457	-0.918051	-0.878602	-0.634454
							-10.0	-0.325708	-0.468499	-0.490429	-0.466944	-0.324709
							-5.0	0.017171	-0.043200	-0.052556	-0.042353	0.011646
							0.0		0.268896	0.392193	0.383309	0.393809	0.255221
							5.0		0.625006	0.796539	0.813314	0.795627	0.581590
							10.0	0.913211	1.203122	1.209030	1.201743	0.908685
							15.0	1.205114	1.391105	1.403776	1.387542	1.199516
							20.0	1.314741	1.362528	1.382874	1.358802	1.306324
							30.0	1.146277	0.653386	0.607393	0.657812	1.143411
						</tableData>
					</table>
				</product>
			</function>

			<function name="aero/force/Lift_pitch_rate">
				<description>Lift due to pitch rate</description>
				<product>
					<property>aero/qbar-psf</property>
					<property>metrics/Sw-sqft</property>
					<property>velocities/q-aero-rad_sec</property>
					<property>aero/ci2vel</property>
					<value>7.2774451</value>
				</product>
			</function>

			<function name="aero/force/Lift_alpha_rate">
				<description>Lift due to alpha rate</description>
				<product>
					<property>aero/qbar-psf</property>
					<property>metrics/Sw-sqft</property>
					<property>aero/alphadot-rad_sec</property>
					<property>aero/ci2vel</property>
					<value>0.7667</value>
				</product>
			</function>

			<function name="aero/force/Lift_elevator">
				<description>Lift due to Elevator Deflection</description>
				<product>
					<property>aero/qbar-psf</property>
					<property>metrics/Sw-sqft</property>
					<property>fcs/elevator-pos-rad</property>
					<property>aero/function/Alpha_Beta_Csurf_Reversal</property>
					<value>0.4575024</value>
				</product>
			</function>

			<function name="aero/force/Lift_aileron">
				<description>Lift due to aileron deflection</description>
				<product>
					<property>aero/qbar-psf</property>
					<property>metrics/Sw-sqft</property>
					<abs><property>fcs/aileron-pos-rad</property></abs>
					<property>aero/function/Alpha_Beta_Csurf_Reversal</property>
					<value>-0.120395</value>
				</product>
			</function>

			<function name="aero/force/Lift_flap">
				<description>Delta Lift due to flaps</description>
				<product>
					<property>aero/qbar-psf</property>
					<property>metrics/Sw-sqft</property>
					<property>fcs/flap-pos-rad</property>
					<property>aero/function/Alpha_Beta_Csurf_Reversal</property>
					<value>0.3168579</value>
				</product>
			</function>
		</axis>

		<axis name="DRAG">
			<function name="aero/force/Drag_base">
				<description>Base drag</description>
				<product>
					<property>aero/qbar-psf</property>
					<property>metrics/Sw-sqft</property>
					<property>aero/function/kCDge</property>
					<sum>
						<table>
							<independentVar lookup="row">aero/alpha-deg</independentVar>
							<independentVar lookup="column">aero/beta-deg</independentVar>
							<tableData>
										-30.0		-10.0		0.0			10.0		30.0
								-15.0	0.105372	0.067236	0.061691	0.066488	0.106254
								-10.0	0.094946	0.035465	0.028419	0.035311	0.095512
								-5.0	0.066179	0.021267	0.015280	0.021192	0.059074
								0.0		0.065606	0.028282	0.021708	0.028377	0.082998
								5.0		0.097108	0.056710	0.047297	0.057240	0.093072
								10.0	0.136603	0.103010	0.096801	0.103093	0.138841
								15.0	0.187837	0.204792	0.202854	0.205557	0.188804
								20.0	0.282659	0.362847	0.364710	0.362697	0.286567
								30.0	0.562146	0.826619	0.852779	0.825548	0.563887
							</tableData>
						</table>
						<value>0.0143632</value> <!-- correction term for incorrect OpenVSP drag -->
					</sum>
				</product>
			</function>

			<function name="aero/force/Drag_pitch_rate">
				<description>Drag due to pitch rate</description>
				<product>
					<property>aero/qbar-psf</property>
					<property>metrics/Sw-sqft</property>
					<property>velocities/q-aero-rad_sec</property>
					<property>aero/ci2vel</property>
					<value>-0.1662570</value>
				</product>
			</function>

			<function name="aero/force/Drag_roll_rate">
				<description>Drag due to roll rate</description>
				<product>
					<property>aero/qbar-psf</property>
					<property>metrics/Sw-sqft</property>
					<property>aero/bi2vel</property>
					<property>velocities/p-aero-rad_sec</property>
					<value>-0.1106012</value>
				</product>
			</function>

			<function name="aero/force/Drag_elevator">
				<description>Drag due to Elevator Deflection</description>
				<product>
					<property>aero/qbar-psf</property>
					<property>metrics/Sw-sqft</property>
					<abs><property>fcs/elevator-pos-rad</property></abs>
					<value>0.0963533</value>
				</product>
			</function>

			<function name="aero/force/Drag_aileron">
				<description>Drag due to aileron deflection</description>
				<product>
					<property>aero/qbar-psf</property>
					<property>metrics/Sw-sqft</property>
					<abs><property>fcs/aileron-pos-rad</property></abs>
					<value>0.112153</value>
				</product>
			</function>

			<function name="aero/force/Drag_rudder">
				<description>Drag due to rudder deflection</description>
				<product>
					<property>aero/qbar-psf</property>
					<property>metrics/Sw-sqft</property>
					<abs><property>fcs/rudder-pos-rad</property></abs>
					<value>0.027332</value>
				</product>
			</function>

			<function name="aero/force/Drag_gear">
				<description>Drag due to gear</description>
				<product>
					<property>aero/qbar-psf</property>
					<property>metrics/Sw-sqft</property>
					<value>0.0055</value>
				</product>
			</function>

			<function name="aero/force/Drag_flap">
				<description>Drag due to flaps</description>
				<product>
					<property>aero/qbar-psf</property>
					<property>metrics/Sw-sqft</property>
					<property>fcs/flap-pos-rad</property>
					<value>0.0511421</value>
				</product>
			</function>
		</axis>

		<axis name="SIDE">
			<function name="aero/force/Side_beta">
				<description>Side force due to beta</description>
				<product>
					<property>aero/qbar-psf</property>
					<property>metrics/Sw-sqft</property>
					<table>
						<independentVar lookup="row">aero/alpha-deg</independentVar>
						<independentVar lookup="column">aero/beta-deg</independentVar>
						<tableData>
									-30.0		-10.0		0.0			10.0		30.0
							-15.0	0.079700	0.038900	-0.000380	-0.039312	-0.079248
							-10.0	0.081647	0.045428	-0.000207	-0.045791	-0.080462
							-5.0	0.098497	0.042245	-0.000083	-0.042543	-0.086839
							0.0		0.095713	0.043417	-0.000013	-0.044415	-0.096955
							5.0		0.074671	0.035395	-0.000007	-0.034715	-0.054990
							10.0	0.060983	0.038487	0.000125	-0.038428	-0.059446
							15.0	0.035947	0.034913	-0.000152	-0.035164	-0.035956
							20.0	0.012824	0.035942	-0.000470	-0.036652	-0.012970
							30.0	-0.010828	0.036806	-0.000953	-0.037896	0.011976
						</tableData>
					</table>
				</product>
			</function>

			<function name="aero/force/Side_roll_rate">
				<description>Side force due to roll rate</description>
				<product>
					<property>aero/qbar-psf</property>
					<property>metrics/Sw-sqft</property>
					<property>aero/bi2vel</property>
					<property>velocities/p-aero-rad_sec</property>
					<value>0.0382808</value>
				</product>
			</function>

			<function name="aero/force/Side_yaw_rate">
				<description>Side force due to yaw rate</description>
				<product>
					<property>aero/qbar-psf</property>
					<property>metrics/Sw-sqft</property>
					<property>aero/bi2vel</property>
					<property>velocities/r-aero-rad_sec</property>
					<value>0.1950433</value>
				</product>
			</function>

			<function name="aero/force/Side_rudder">
				<description>Side force due to rudder</description>
				<product>
					<property>aero/qbar-psf</property>
					<property>metrics/Sw-sqft</property>
					<property>fcs/rudder-pos-rad</property>
					<property>aero/function/Alpha_Beta_Csurf_Reversal</property>
					<value>0.108931</value>
				</product>
			</function>
		</axis>

		<axis name="PITCH">
			<!--<function name="aero/moment/Pitch_propwash">
				<description>Pitch moment due to propeller induced velocity</description>
				<product>
					<property>propulsion/engine[0]/thrust-coefficient</property>
					<property>aero/qbar-psf</property>
					<property>metrics/Sw-sqft</property>
					<property>metrics/bw-ft</property>
					<table>
						<independentVar lookup="row">aero/alpha-rad</independentVar>
						<independentVar lookup="column">fcs/flap-pos-deg</independentVar>
						<tableData>
									0		60
							-0.01	0		0
							0.00	0.014	0.037
							0.27	0.064	0.171
							0.36	0		0
						</tableData>
					</table>
				</product>
			</function>-->

			<function name="aero/moment/Pitch_alpha">
				<description>Pitch moment due to alpha</description>
				<product>
					<property>aero/qbar-psf</property>
					<property>metrics/Sw-sqft</property>
					<property>metrics/cbarw-ft</property>
					<table>
<!--						<independentVar lookup="row">aero/alpha-deg</independentVar>
						<independentVar lookup="column">aero/beta-deg</independentVar>
						<tableData>
									-30.0		-10.0		0.0			10.0		30.0
							-15.0	-0.235533	0.002079	0.055830	0.000877	-0.236641
							-10.0	-0.250075	-0.005642	0.062306	0.005886	-0.243910
							-5.0	0.931276	0.095014	0.051131	0.077219	-0.009852
							0.0		0.002888	-0.012725	0.033768	0.041809	0.045906
							5.0		0.051534	0.076883	0.004299	0.100198	2.119253
							10.0	-0.215050	0.039724	-0.044374	0.037558	-0.302906
							15.0	-8.571719	-0.103579	-0.139979	-0.088344	-0.852445
							20.0	-1.506057	-0.167376	-0.297101	-0.153964	2.287937
							30.0	-0.673551	-0.370630	-0.373964	-0.384945	-0.730488
						</tableData>-->
						<independentVar lookup="row">aero/alpha-deg</independentVar>
						<tableData>
							-15.0	0.05583
							-10.0	0.062306
							-5.0	0.051131
							0.0		0.033768
							5.0		0.0043
							10.0	-0.044374
							14.0	-0.12
							15		-0.01
						</tableData>
					</table>
					<cos>
						<property>aero/beta-rad</property>
					</cos>
				</product>
			</function>

			<function name="aero/moment/Pitch_elevator">
				<description>Pitch moment due to elevator</description>
				<product>
					<property>aero/qbar-psf</property>
					<property>metrics/Sw-sqft</property>
					<property>metrics/cbarw-ft</property>
					<property>fcs/elevator-pos-rad</property>
					<property>aero/function/Alpha_Beta_Csurf_Reversal</property>
					<value>-1.290231</value>
					<value>2</value> <!-- to simulate all-movable horizontal tail -->
				</product>
			</function>

			<function name="aero/moment/Pitch_aileron">
				<description>Pitch moment due to ailerons</description>
				<product>
					<property>aero/qbar-psf</property>
					<property>metrics/Sw-sqft</property>
					<property>metrics/cbarw-ft</property>
					<property>fcs/elevator-pos-rad</property>
					<property>aero/function/Alpha_Beta_Csurf_Reversal</property>
					<value>0.6261751</value>
				</product>
			</function>

			<function name="aero/moment/Pitch_flaps">
				<description>Pitch moment due to flaps</description>
				<product>
					<property>aero/qbar-psf</property>
					<property>metrics/Sw-sqft</property>
					<property>metrics/cbarw-ft</property>
					<property>fcs/flap-pos-rad</property>
					<property>aero/function/Alpha_Beta_Csurf_Reversal</property>
					<value>0.1524785</value>
				</product>
			</function>

			<function name="aero/moment/Pitch_damp">
				<description>Pitch moment due to pitch rate</description>
				<product>
					<property>aero/qbar-psf</property>
					<property>metrics/Sw-sqft</property>
					<property>metrics/cbarw-ft</property>
					<property>aero/ci2vel</property>
					<property>velocities/q-aero-rad_sec</property>
					<value>-17.4293852</value>
				</product>
			</function>

			<function name="aero/moment/Pitch_roll_rate">
				<description>Pitch moment due to roll rate</description>
				<product>
					<property>aero/qbar-psf</property>
					<property>metrics/Sw-sqft</property>
					<property>metrics/bw-ft</property>
					<property>aero/bi2vel</property>
					<property>velocities/p-rad_sec</property>
					<value>-0.1268316</value>
				</product>
			</function>

			<function name="aero/moment/Pitch_yaw_rate">
				<description>Pitch moment due to yaw rate</description>
				<product>
					<property>aero/qbar-psf</property>
					<property>metrics/Sw-sqft</property>
					<property>metrics/bw-ft</property>
					<property>aero/bi2vel</property>
					<property>velocities/r-aero-rad_sec</property>
					<value>-0.1628316</value>
				</product>
			</function>

			<function name="aero/moment/Pitch_alphadot">
				<description>Pitch moment due to alpha rate</description>
				<product>
					<property>aero/qbar-psf</property>
					<property>metrics/Sw-sqft</property>
					<property>metrics/cbarw-ft</property>
					<property>aero/ci2vel</property>
					<property>aero/alphadot-rad_sec</property>
					<value>-7</value>
				</product>
			</function>
		</axis>

		<axis name="ROLL">
			<!--<function name="aero/moment/Roll_differential_propwash">
				<description>Roll moment due to differential propwash</description>
				<product>
					<property>propulsion/engine[0]/thrust-coefficient</property>
					<property>aero/qbar-psf</property>
					<property>metrics/Sw-sqft</property>
					<property>metrics/bw-ft</property>
					<property>aero/alpha-rad</property>
					<value>0.1285</value>
				</product>
			</function>-->

			<function name="aero/moment/Roll_beta">
				<description>Roll moment due to beta</description>
				<product>
					<property>aero/qbar-psf</property>
					<property>metrics/Sw-sqft</property>
					<property>metrics/bw-ft</property>
					<value>-1</value>
					<table>
						<independentVar lookup="row">aero/alpha-deg</independentVar>
						<independentVar lookup="column">aero/beta-deg</independentVar>
						<tableData>
									-30.0		-10.0		0.0	10.0		30.0
							-15.0	-0.011404	-0.004803	0	0.004980	0.011341
							-10.0	-0.012832	-0.005148	0	0.005374	0.012818
							-5.0	-0.014109	-0.004438	0	0.004456	0.014427
							0.0		-0.018230	-0.004117	0	0.004140	0.019879
							5.0		-0.017859	-0.004132	0	0.004079	0.017737
							10.0	-0.017628	-0.003690	0	0.003614	0.018354
							<!--15.0	-0.607920	-0.004270	0	0.004278	0.607920-->
							20.0	-0.051660	-0.007966	0	0.007980	0.051660
							30.0	-0.032209	-0.017133	0	0.016531	0.032209
						</tableData>
					</table>
					<table>
						<independentVar lookup="row">aero/alpha-deg</independentVar>
						<tableData>
							14     1
							15     3.5
						</tableData>
					</table>
				</product>
			</function>

			<function name="aero/moment/Roll_damp">
				<description>Roll moment due to roll rate</description>
				<product>
					<property>aero/qbar-psf</property>
					<property>metrics/Sw-sqft</property>
					<property>metrics/bw-ft</property>
					<property>aero/bi2vel</property>
					<property>velocities/p-aero-rad_sec</property>
					<value>-0.5428329</value>
					<table>
						<independentVar lookup="row">aero/alpha-wing-rad</independentVar>
						<tableData>
							14    1
							15    0.4
						</tableData>
					</table>
				</product>
			</function>

			<function name="aero/moment/Roll_yaw">
				<description>Roll moment due to yaw rate</description>
				<product>
					<property>aero/qbar-psf</property>
					<property>metrics/Sw-sqft</property>
					<property>metrics/bw-ft</property>
					<property>aero/bi2vel</property>
					<property>velocities/r-aero-rad_sec</property>
					<value>0.1003814</value>
					<table>
						<independentVar lookup="row">aero/alpha-deg</independentVar>
						<independentVar lookup="column">velocities/r-aero-rad_sec</independentVar>
						<independentVar lookup="table">aero/stall-hyst-norm</independentVar>
						<tableData breakPoint="0">
								-0.15	-0.1	0	0.1	0.15
							14	1		1		1	1	1
							15	35 		30		1	30	35
							30	5		5		1	5	5
						</tableData>
						<tableData breakPoint="1">
								-0.15	-0.1	0	0.1	0.15
							15	35		30		1	30	35
							30	5		5		1	5	5
						</tableData>
					</table>
				</product>
			</function>

			<function name="aero/moment/Roll_aileron">
				<description>Roll moment due to aileron</description>
				<product>
					<property>aero/qbar-psf</property>
					<property>metrics/Sw-sqft</property>
					<property>metrics/bw-ft</property>
					<property>aero/function/Alpha_Beta_Csurf_Reversal</property>
					<table>
						<independentVar>fcs/aileron-pos-deg</independentVar>
						<tableData>
							-20		-0.103631
							20		0.103631
						</tableData>
					</table>
				</product>
			</function>

			<function name="aero/moment/Roll_rudder">
				<description>Roll moment due to rudder</description>
				<product>
					<property>aero/qbar-psf</property>
					<property>metrics/Sw-sqft</property>
					<property>metrics/bw-ft</property>
					<property>fcs/rudder-pos-rad</property>
					<property>aero/function/Alpha_Beta_Csurf_Reversal</property>
					<value>0.0033953</value>
				</product>
			</function>
		</axis>

		<axis name="YAW">
			<function name="aero/moment/Yaw_beta">
				<description>Yaw moment due to beta</description>
				<product>
					<property>aero/qbar-psf</property>
					<property>metrics/Sw-sqft</property>
					<property>metrics/bw-ft</property>
					<table>
						<independentVar>aero/beta-deg</independentVar>
						<tableData>
							-30		0.024
							-10		0.0073
							0		0
							10		-0.0073
							30		-0.024
						</tableData>
					</table>
					<value>-1</value>
				</product>
			</function>

			<function name="aero/moment/Yaw_flat_spin">
				<description>Yaw moment due to flat spin</description>
				<product>
					<property>aero/qbar-psf</property>
					<property>metrics/Sw-sqft</property>
					<property>metrics/bw-ft</property>
					<property>aero/bi2vel</property>
					<table>
						<independentVar lookup="row">velocities/r-aero-rad_sec</independentVar>
						<independentVar lookup="column">aero/alpha-deg</independentVar>
						<tableData>
								-23		-14	14	23
							-5	0		0	0	0
							-3	-0.2	0	0	-0.2
							0	0		0	0	0
							3	0.2		0	0	0.2
							5	0		0	0	0
						</tableData>
					</table>
				</product>
			</function>

			<function name="aero/moment/Yaw_roll_rate">
				<description>Yaw moment due to roll rate</description>
				<product>
					<property>aero/qbar-psf</property>
					<property>metrics/Sw-sqft</property>
					<property>metrics/bw-ft</property>
					<property>aero/bi2vel</property>
					<property>velocities/p-rad_sec</property>
					<value>-0.0410610</value>
				</product>
			</function>

			<function name="aero/moment/Yaw_damp">
				<description>Yaw moment due to yaw rate</description>
				<product>
					<property>aero/qbar-psf</property>
					<property>metrics/Sw-sqft</property>
					<property>metrics/bw-ft</property>
					<property>aero/bi2vel</property>
					<property>velocities/r-aero-rad_sec</property>
					<value>-0.0770952</value>
				</product>
			</function>

			<function name="aero/moment/Yaw_rudder">
				<description>Yaw moment due to rudder</description>
				<product>
					<property>aero/qbar-psf</property>
					<property>metrics/Sw-sqft</property>
					<property>metrics/bw-ft</property>
					<property>fcs/rudder-pos-rad</property>
					<property>aero/function/Alpha_Beta_Csurf_Reversal</property>
					<value>-0.037832</value>
				</product>
			</function>

			<function name="aero/moment/Yaw_aileron">
				<description>Adverse yaw</description>
				<product>
					<property>aero/qbar-psf</property>
					<property>metrics/Sw-sqft</property>
					<property>metrics/bw-ft</property>
					<property>fcs/aileron-pos-rad</property>
					<value>-0.003169</value>
				</product>
			</function>
		</axis>
	</aerodynamics>
</fdm_config>
